// SBML level 3 version 1

model model_0000001()
  // Tabak2007_dopamine
  // This model was automatically converted from model BIOMD0000000138 by using libSBML .
  // According to the BioModels Database terms of use , this generated model is not related with model BIOMD0000000138 any more.
  // biomodels.db:MODEL6090663405
  // biomodels.db:BIOMD0000000138
  // isDescribedBy pubmed:17058022
  // occursIn taxonomy:7711
  // isVersionOf GO:0046887 GO:0014046 GO:0005267
  // model units - time: time

  // Compartments:
  compartment cell = 1 volume;  // isVersionOf GO:0005623

  // Species:
  // The concentration of Ca range can change from 0.1 to 0.3
  species c in cell = 0.3; c is "calcium concentration";  // CHEBI:29108 kegg.compound:C00076

  // Parameters:
  vca = 50; vca is "reversal potential for Ca";
  vk = -75; vk is "reversal potential for K";
  Cm = 10; Cm is "membrane capacitance";
  gk = 4;
  gcal = 2;
  gsk = 1.7;
  // For figure 5A, ga=0, figure5B, ga=8, figure5C, ga=25
  ga = 0;
  gf = 0;
  vn = -5;
  va = -20;
  vm = -20;
  vh = -60;
  vf = -20;
  sn = 10;
  sa = 10;
  sm = 12;
  sh = 5;
  sf = 5.6;
  taun = 30;
  tauh = 20;
  lambda = 0.7;
  kc = 0.16;
  ks = 0.5;
  ff = 0.01;
  alpha = 0.0015;
  n = 0.1;
  h = 0.1;
  V = -60;

  // Assignment rules:
  phik := 1/(1 + exp((vn - V)/sn));
  phia := 1/(1 + exp((va - V)/sa));
  phih := 1/(1 + exp((V - vh)/sh));
  phif := 1/(1 + exp((vf - V)/sf));
  phical := 1/(1 + exp((vm - V)/sm));
  ica := gcal*phical*(V - vca);
  cinf := c^2/(c^2 + ks^2);
  isk := gsk*cinf*(V - vk);
  ibk := gf*phif*(V - vk);
  ikdr := gk*n*(V - vk);
  ia := ga*phia*h*(V - vk);
  ik := isk + ibk + ikdr + ia;

  // Rate rules:
  V' = -(ica + ik)/Cm;
  n' = lambda*(phik - n)/taun;
  h' = (phih - h)/tauh;

  // Reactions:
  reaction_0000004: => c; -ff*(alpha*ica + kc*c)*cell;  // isVersionOf GO:0006816

  // Unit definitions:
  unit ms = 1e-3 second;
  unit mV = 1e-3 volt;
  unit micro_mole = 1e-6 mole;
  unit volume = litre;
  unit substance = mole;
  unit time = second;
end
