// SBML level 2 version 3
// This model was downloaded from BioModels Database
// http://www.ebi.ac.uk/biomodels/

model Locke2008_Circadian_Clock()
  // The model reproduces Fig 2A of the paper. Model successfully reproduced using Jarnac and MathSBML.
  // To the extent possible under law, all copyright and related or neighbouring rights to this encoded model have been dedicated to the public domain worldwide. Please refer to CC0 Public Domain Dedication for more information.
  // In summary, you are entitled to use this encoded model in absolutely any manner you deem suitable, verbatim, or with modification, alone or embedded it in a larger context, redistribute it, commercially or not, in a restricted way or not.
  // To cite BioModels Database, please use: Li C, Donizelli M, Rodriguez N, Dharuri H, Endler L, Chelliah V, Li L, He E, Henry A, Stefan MI, Snoep JL, Hucka M, Le Novère N, Laibe C (2010) BioModels Database: An enhanced, curated and annotated resource for published quantitative kinetic models. BMC Syst Biol., 4:92.
  // biomodels.db:MODEL9223733527
  // biomodels.db:BIOMD0000000185
  // isDescribedBy pubmed:18312618
  // occursIn taxonomy:40674
  // isVersionOf GO:0048512 GO:0032922

  // Compartments:
  compartment compartment = 1; compartment is "Cell";  // GO:0005623

  // Species:
  species X1 in compartment = 4.25; X1 is "clock gene mRNA";  // isVersionOf CHEBI:33699; encodes uniprot:O15516
  species Y1 in compartment = 3.25; Y1 is "clock protein";  // isHomologTo uniprot:O15516
  species Z1 in compartment = 2.25; Z1 is "Transcriptional repressor";
  species V1 in compartment = 2.5; V1 is "Neuropeptide";  // isHomologTo uniprot:Q9VET0; hasVersion GO:0005184
  species X2 in compartment = 0; X2 is "clock gene mRNA";  // encodes uniprot:O15516; isVersionOf CHEBI:33699
  species Y2 in compartment = 0; Y2 is "clock protein";  // isHomologTo uniprot:O15516
  species Z2 in compartment = 0; Z2 is "Transcriptional repressor";
  species V2 in compartment = 0; V2 is "Neuropeptide";  // isHomologTo uniprot:Q9VET0; hasVersion GO:0005184

  // Parameters:
  F has nM;
  v_1 = 6.8355 nM_hr_1;
  K1 = 2.7266 nM;
  n = 5.6645 dimensionless;
  v_2 = 8.4297 nM_hr_1;
  K2 = 0.291 nM;
  vc = 6.7924 nM_hr_1;
  K = 1 dimensionless;
  Kc = 4.8283 nM;
  L = 0 nM_hr_1;
  k3 = 0.1177 hr_1;
  v_4 = 1.0841 nM_hr_1;
  K4 = 8.1343 nM;
  k5 = 0.3352 hr_1;
  v_6 = 4.6645 nM_hr_1;
  K6 = 9.9849 nM;
  k7 = 0.2282 hr_1;
  v_8 = 3.5216 nM_hr_1;
  K8 = 7.4519 nM;
  one_nM = 1 nM;
  one_half = 0.5 dimensionless;

  // Assignment rules:
  F := one_half*(V1 + V2);

  // Reactions:
  R1: => X1; compartment*v_1*(K1/one_nM)^n/((K1/one_nM)^n + (Z1/one_nM)^n); R1 is "Transcription";  // modifiers: Z1; isVersionOf GO:0009299 GO:0006355
  R2: X1 => ; compartment*v_2*X1/(K2 + X1); R2 is "mRNA degradation";  // isVersionOf GO:0006402
  R3: => X1; compartment*vc*K*F/(Kc + K*F); R3 is "Neuropeptide dependent transcription activation";  // isVersionOf GO:0045893
  R4: => X1; compartment*L; R4 is "Light dependent transcription activation";  // isVersionOf GO:0045893
  R5: => Y1; compartment*k3*X1; R5 is "Translation";  // modifiers: X1; isVersionOf GO:0006412
  R6: Y1 => ; compartment*v_4*Y1/(K4 + Y1); R6 is "Protein degradation";  // isVersionOf GO:0044257
  R7: => Z1; compartment*k5*Y1; R7 is "Transcriptional repressor synthesis";  // modifiers: Y1
  R8: Z1 => ; compartment*v_6*Z1/(K6 + Z1); R8 is "Transcriptional repressor degradation";  // isVersionOf GO:0044257
  R9: => V1; compartment*k7*X1; R9 is "Neuropeptide synthesis";  // modifiers: X1; isVersionOf GO:0006412
  R10: V1 => ; compartment*v_8*V1/(K8 + V1); R10 is "Neuropeptide degradation";  // isVersionOf GO:0044257
  R11: => X2; compartment*v_1*(K1/one_nM)^n/((K1/one_nM)^n + (Z2/one_nM)^n); R11 is "Transcription";  // modifiers: Z2; isVersionOf GO:0009299 GO:0006355
  R12: X2 => ; compartment*v_2*X2/(K2 + X2); R12 is "mRNA degradation";  // isVersionOf GO:0006402
  R13: => X2; compartment*vc*K*F/(Kc + K*F); R13 is "Neuropeptide dependent transcription activation";  // isVersionOf GO:0045893
  R14: => X2; compartment*L; R14 is "Light dependent transcription activation";  // isVersionOf GO:0045893
  R15: => Y2; compartment*k3*X2; R15 is "Translation";  // modifiers: X2; isVersionOf GO:0006412
  R16: Y2 => ; compartment*v_4*Y2/(K4 + Y2); R16 is "Protein degradation";  // isVersionOf GO:0044257
  R17: => Z2; compartment*k5*Y2; R17 is "Transcriptional repressor synthesis";  // modifiers: Y2
  R18: Z2 => ; compartment*v_6*Z2/(K6 + Z2); R18 is "Transcriptional repressor degradation";  // isVersionOf GO:0044257
  R19: => V2; compartment*k7*X2; R19 is "Neuropeptide synthesis";  // modifiers: X2; isVersionOf GO:0006412
  R20: V2 => ; compartment*v_8*V2/(K8 + V2); R20 is "Neuropeptide degradation";  // isVersionOf GO:0044257

  // Unit definitions:
  unit substance = 1e-9 mole; substance is "nano mole";
  unit time = 3600 second; time is "hour";
  unit nM = 1e-9 mole / litre;
  unit nM_hr_1 = 1e-9 mole / (litre * 3600 second);
  unit hr_1 = 1 / (3600 second);
end
