// SBML level 3 version 1

model Meyer1991_CalciumSpike_ICC()
  // This model was automatically converted from model BIOMD0000000224 by using libSBML .
  // According to the BioModels Database terms of use , this generated model is not related with model BIOMD0000000224 any more.
  // biomodels.db:MODEL9412103933
  // biomodels.db:BIOMD0000000224
  // isDescribedBy pubmed:1867714
  // isVersionOf GO:0051279
  // occursIn taxonomy:10117
  // model units - time: time

  // Compartments:
  compartment cytosol = 1 volume;  // isVersionOf GO:0005829
  compartment ER_store = 1 volume;  // isVersionOf GO:0005783

  // Species:
  species CaI in cytosol = 0.1;  // isVersionOf CHEBI:29108 kegg.compound:C00076
  species IP3 in cytosol = 0.05;  // isVersionOf CHEBI:16595 kegg.compound:C01255
  species CaS in ER_store = 1100;  // isVersionOf CHEBI:29108 kegg.compound:C00076
  species g in cytosol = 0;  // isVersionOf GO:0019855

  // Parameters:
  A = 20 psec;
  B = 40 microMpsec;
  C = 1.1 microMpsec;
  D = 2 psec;
  E = 1 microM4;
  F = 0.02 psec;
  k1 = 0.5 microM;
  k2 = 0.15 microM;
  k3 = 1 microM;
  L = 0.01 psec;
  R = 0.09;

  // Reactions:
  JChannel: CaS => CaI; (1 - g)*(A*(IP3*0.5)^4/(IP3*0.5 + k1)^4 + L)*CaS;  // modifiers: IP3, g; isVersionOf GO:0051209
  JPump: CaI => CaS; B*(CaI*0.01)^2/((CaI*0.01)^2 + k2^2);  // isVersionOf GO:0060401
  kPLC: => IP3; C*(1 - k3/(CaI*0.01 + k3)*(1/(1 + R)));  // modifiers: CaI; isVersionOf GO:0032959
  kPhosphatase: IP3 => ; D*IP3*0.5;  // isVersionOf GO:0032961
  inhibition_parameter1: => g; E*(CaI*0.01)^4*(1 - g);  // modifiers: CaI
  inhibition_parameter2: g => ; F;  // modifiers: CaI

  // Unit definitions:
  unit microM = 1e-6 mole / litre;
  unit microMpsec = 1e-6 mole / (second * litre);
  unit microM4 = 1 / ((1e-6 mole)^4 * second * litre);
  unit psec = 1 / second;
  unit volume = litre;
  unit substance = mole;
  unit time = second;
end
